A := [3; 1; 1]
B := [2; 2; 1]
D := [3; -1; 1]
A_1 := [1; -1; 3]
# 1)
AB := B - A = [-1; 1; 0]
AD := D - A = [0; -2; 0]
cross_product := AB×AD = [0; 0; 2]
||cross_product|| = 2
# Вектора линейно независимы т.к. модуль векторного произведения не равен 0 => на этих векторах можно построить параллелограм.
|AB| = 1.41421
||AD|| = 2
# Находим длины сторон параллелограма.
# 2)
O := (B + D)/2 = [2.5; 0.5; 1]
# координата точки пересечения диагоналей
BO := O - B = [0.5; -1.5; 0]
AO := O - A = [-0.5; -0.5; 0]
cos_of_angle := AO*BO/(||AO||*||BO||) = 0.447214
angle := acos(cos_of_angle)*180/π = 63.4349
# угол и косинус угла между векторами BO и AO
angle_2 := 180 - angle = 116.565
# смежный угол к углу AOB
# 3)
cross_product := AB×AD = [0; 0; 2]
||cross_product|| = 2
# площадь параллелограма = модулю векторного произведения векторов
# 4)
AA_1 := A_1 - A = [-2; -2; 2]
triple_product := |AA_1*(AB×AD)| = 4
# т.к. модуль смешанного произведения не равен 0 => на этих векторах можно построить параллелепипед с объемом = 4
h := triple_product/|cross_product| = 2
# высота = модуль смешанного произведения (объем) деленное на модуль векторного (площадь)
# 5)
λ := |h|/|cross_product| = 1
AH := cross_product*λ = [0; 0; 2]
# вектор AH равняется произведению псевдовектора (полученного при векторном произведении) и коэффицента (полученного при делении высоты на модуль векторного произведения)
# единичный вектор равняется отношению вектора на длину этого самого вектора
H := A - AH = [3; 1; -1]
AH_e := AH/|AH| = [0; 0; 1]
# 6)
C := augment(AB, AD, AA_1) = [-1, 0, -2; 1, -2, -2; 0, 0, 2]
||C|| = 4
x := lsolve(C, AH) → [-2; -2; 1]
# 7)
projectionAH_AA1 := AH*AA_1/|AA_1| = 1.1547
# проекция вектора AH на AA1
# 8)
# a)
ORIGIN := 1
A = [3; 1; 1]
B = [2; 2; 1]
D = [3; -1; 1]
matrix := [3, 1, 1; 2, 2, 1; 3, -1, 1]
AB = [-1; 1; 0]
AD = [0; -2; 0]
X := matrix[:, 1]
Y := matrix[:, 2]
Z := matrix[:, 3]
P(x, y, z) := [x - 3, y - 1, z - 1; -1, 1, 0; 0, -2, 0]
f(x, y, z) := |P(x, y, z)|
f(x, y, z) solve → 1
# б)
AB_1 := AB + AA_1 = [-3; -1; 2]
B_1 := AB_1 + A = [0; 0; 3]
A_1B_1 := B_1 - A_1 = [-1; 1; 0]
A = [3; 1; 1]
A_1 = [1; -1; 3]
B_1 = [0; 0; 3]
matrix2 := [3, 1, 1; 1, -1, 3; 0, 0, 3]
AA_1 = [-2; -2; 2]
AB_1 = [-3; -1; 2]
X := matrix2[:, 1]
Y := matrix2[:, 2]
Z := matrix2[:, 3]
P1(x2, y2, z2) := [x2 - 3, y2 - 1, z2 - 1; -2, -2, 2; -3, -1, 2]
f(x2, y2, z2) := |P1(x2, y2, z2)|
f(x2, y2, z2) solve →  # error: Больше одной независимой переменной для ключевого слова {0}.
# в)
P(x, y, z) =  # error: Эта переменная не определена. Проверьте правильность установки обозначения.
A_1 = [1; -1; 3]
|P(x, y, z)| =  # error
# 9)
